// SBML level 3 version 2

function F(t, x)
  !t || !x;
end
F is "Eventually Property";

model futileCycle(Cell)

  // Compartments:
  compartment Cell = 1;

  // Species:
  substanceOnly species S0 in Cell = 1;
  substanceOnly species S1 in Cell = 50;
  substanceOnly species S2 in Cell = 0;
  substanceOnly species S3 in Cell = 1;
  substanceOnly species S4 in Cell = 50;
  substanceOnly species S5 in Cell = 0;

  // Reactions:
  R0: S0 + S1 => S2; R0_kf*S0*S1;
    R0_kf = 1; R0_kr = 1;
  R1: S2 => S1 + S0; R1_kf*S2;
    R1_kf = 1; R1_kr = 1;
  R2: S2 => S0 + S4; R2_kf*S2;
    R2_kf = 0.1; R2_kr = 1;
  R3: S3 + S4 => S5; R3_kf*S3*S4;
    R3_kf = 1; R3_kr = 1;
  R4: S5 => S3 + S4; R4_kf*S5;
    R4_kf = 1; R4_kr = 1;
  R5: S5 => S1 + S3; R5_kf*S5;
    R5_kf = 0.1; R5_kr = 1;

  // Constraints:
  constraint F(time <= 100, S4 <= 25);
end
