// SBML level 3 version 2

function F(t, x)
  !t || !x;
end
F is "Eventually Property";

model yeastPolarization(Cell)

  // Compartments:
  compartment Cell = 1;

  // Species:
  substanceOnly species S0 in Cell = 50;
  substanceOnly species S1 in Cell = 2;
  substanceOnly species S2 in Cell = 0;
  substanceOnly species S3 in Cell = 50;
  substanceOnly species S4 in Cell = 0;
  substanceOnly species S5 in Cell = 0;
  substanceOnly species S6 in Cell = 0;

  // Reactions:
  R0: => S0; R0_kf;
    R0_kf = 0.0038; R0_kr = 1;
  R1: S0 => ; R1_kf*S0;
    R1_kf = 0.0004; R1_kr = 1;
  R2: S0 + S1 => S1 + S2; R2_kf*S0*S1;
    R2_kf = 0.042; R2_kr = 1;
  R3: S2 => S0; R3_kf*S2;
    R3_kf = 0.01; R3_kr = 1;
  R4: S2 + S3 => S4 + S5; R4_kf*S2*S3;
    R4_kf = 0.011; R4_kr = 1;
  R5: S4 => S6; R5_kf*S4;
    R5_kf = 0.1; R5_kr = 1;
  R6: S5 + S6 => S3; R6_kf*S5*S6;
    R6_kf = 1050; R6_kr = 1;
  R7: => S2; R7_kf;
    R7_kf = 3.21; R7_kr = 1;

  // Constraints:
  constraint F(time <= 20, S5 >= 50);
end
