// SBML level 3 version 2

function F(t, x)
  !t || !x;
end
F is "Eventually Property";

model motilReg(Cell)

  // Compartments:
  compartment Cell = 1;

  // Species:
  substanceOnly species S0 in Cell = 1;
  substanceOnly species S1 in Cell = 10;
  substanceOnly species S2 in Cell = 1;
  substanceOnly species S3 in Cell = 10;
  substanceOnly species S4 in Cell = 1;
  substanceOnly species S5 in Cell = 1;
  substanceOnly species S6 in Cell = 10;
  substanceOnly species S7 in Cell = 1;
  substanceOnly species S8 in Cell = 1;

  // Reactions:
  R0: S0 => S0 + S1; R0_kf*S0;
    R0_kf = 0.1; R0_kr = 1;
  R1: S1 => ; R1_kf*S1;
    R1_kf = 0.0002; R1_kr = 1;
  R2: S2 => S2 + S3; R2_kf*S2;
    R2_kf = 1; R2_kr = 1;
  R3: S3 => ; R3_kf*S3;
    R3_kf = 0.002; R3_kr = 1;
  R4: S4 => S3 + S5 + S6; R4_kf*S4;
    R4_kf = 1; R4_kr = 1;
  R5: S6 => ; R5_kf*S6;
    R5_kf = 0.0002; R5_kr = 1;
  R6: S3 + S5 => S4; R6_kf*S3*S5;
    R6_kf = 0.01; R6_kr = 1;
  R7: S4 => S4 + S5; R7_kf*S4;
    R7_kf = 0.1; R7_kr = 1;
  R8: S1 + S2 => S7; R8_kf*S1*S2;
    R8_kf = 0.02; R8_kr = 1;
  R9: S7 => S1 + S0; R9_kf*S7;
    R9_kf = 0.1; R9_kr = 1;
  R10: S1 + S5 => S8; R10_kf*S1*S5;
    R10_kf = 0.01; R10_kr = 1;
  R11: S8 => S1 + S5; R11_kf*S8;
    R11_kf = 0.1; R11_kr = 1;

  // Constraints:
  constraint F(time <= 10, S1 >= 20);
end
