// SBML level 2 version 2

function St(x)
  !(!x);
end
St is "Steady State Property";

function uniform(a, b)
  (a + b)/2;
end
uniform is "Uniform distribution";

function PF(t, x)
  uniform(0, 1);
end
PF is "Probabilistic Eventually Property";

model dual_feedback_oscillator(Cell, AraC, Degradation_AraC, LacI, Degradation_LacI, Cell)

  // Compartments:
  compartment Cell = 1;

  // Species:
  substanceOnly species AraC in Cell = 0;
  substanceOnly species LacI in Cell = 0;
  substanceOnly species P1 in Cell = 20;
  substanceOnly species P2 in Cell = 20;

  // Parameters:
  ko_r = 1; ko_r is "Reverse RNAP binding rate";
  nr = 100; nr is "Initial RNAP count";
  np = 10; np is "Stoichiometry of production";
  kr_r = 1; kr_r is "Reverse repression binding rate";
  ka_f = 0.0033; ka_f is "Forward activation binding rate";
  kecdiff = 1; kecdiff is "Extracellular diffusion rate";
  ko = 0.05; ko is "Open complex production rate";
  kmdiff_f = 1; kmdiff_f is "Forward membrane diffusion rate";
  kecd = 0.005; kecd is "Extracellular degradation rate";
  kc_r = 1; kc_r is "Reverse complex formation rate";
  kr_f = 0.5; kr_f is "Forward repression binding rate";
  ka_r = 1; ka_r is "Reverse activation binding rate";
  nc = 2; nc is "Stoichiometry of binding";
  kd = 0.0075; kd is "Degradation rate";
  kao_r = 1; kao_r is "Reverse activated RNAP binding rate";
  kb = 0.0001; kb is "Basal production rate";
  ng = 20; ng is "Initial promoter count";
  ka = 0.25; ka is "Activated production rate";
  kao_f = 1; kao_f is "Forward activated RNAP binding rate";
  kmdiff_r = 0.01; kmdiff_r is "Reverse membrane diffusion rate";
  ko_f = 0.033; ko_f is "Forward RNAP binding rate";
  kc_f = 0.05; kc_f is "Forward complex formation rate";
  limit = 0;

  // Reactions:
  Degradation_AraC: AraC => ; kd*AraC;
  Degradation_LacI: LacI => ; kd*LacI;
  Production_P1: => 10 LacI; P1*(kb*(ko_f/ko_r)*nr + ka*(kao_f/kao_r)*nr*(ka_f/ka_r*AraC)^nc)/(1 + ko_f/ko_r*nr + kao_f/kao_r*nr*(ka_f/ka_r*AraC)^nc + (kr_f/kr_r*LacI)^nc);  // modifiers: P1, AraC
  Production_P2: => 10 AraC; P2*(kb*(ko_f/ko_r)*nr + ka*(kao_f/kao_r)*nr*(ka_f/ka_r*AraC)^nc)/(1 + ko_f/ko_r*nr + kao_f/kao_r*nr*(ka_f/ka_r*AraC)^nc + (kr_f/kr_r*LacI)^nc);  // modifiers: P2, LacI

  // Constraints:
  constraint St(((AraC >= 60) && (PF(time <= 3000, AraC < 60) >= 0.95)) || ((AraC < 60) && (PF(time <= 3000, AraC >= 60) >= 0.95)));
end
