// SBML level 2 version 1

model ToggleSwitchCaseStudy(Cell)

  // Compartments:
  compartment Cell = 1;

  // Species:
  substanceOnly species P1 in Cell = 2;
  substanceOnly species $IPTG in Cell = 0;
  substanceOnly species $aTc in Cell = 0;
  substanceOnly species TetR in Cell = 0;
  substanceOnly species GFP in Cell = 0;
  substanceOnly species P2 in Cell = 2;
  substanceOnly species C1 in Cell = 0;
  substanceOnly species C2 in Cell = 0;
  substanceOnly species LacI in Cell = 0;

  // Parameters:
  kd = 0.0075; kd is "Degradation rate";
  kc_f = 0.05; kc_f is "Forward complex formation rate";
  kc_r = 1; kc_r is "Reverse complex formation rate";
  nc = 2; nc is "Stoichiometry of binding";
  kr_f = 0.5; kr_f is "Forward repression binding rate";
  kr_r = 1; kr_r is "Reverse repression binding rate";
  ka_f = 0.0033; ka_f is "Forward activation binding rate";
  ka_r = 1; ka_r is "Reverse activation binding rate";
  ko_f = 0.033; ko_f is "Forward RNAP binding rate";
  ko_r = 1; ko_r is "Reverse RNAP binding rate";
  kao_f = 1; kao_f is "Forward activated RNAP binding rate";
  kao_r = 1; kao_r is "Reverse activated RNAP binding rate";
  nr = 30; nr is "Initial RNAP count";
  ko = 0.05; ko is "Open complex production rate";
  kb = 0.0001; kb is "Basal production rate";
  ng = 2; ng is "Initial promoter count";
  np = 10; np is "Stoichiometry of production";
  ka = 0.25; ka is "Activated production rate";

  // Reactions:
  Degradation_TetR: TetR => ; kd*TetR;
  Degradation_GFP: GFP => ; kd*GFP;
  Degradation_C2: C2 => ; kd*C2;
  Degradation_LacI: LacI => ; kd*LacI;
  Degradation_C1: C1 => ; kd*C1;
  Complex_C1: $IPTG + LacI -> C1; kc_f*IPTG^nc_IPTG*LacI^nc_LacI - kc_r*C1;
    nc_IPTG = 1; nc_LacI = 1;
  Complex_C2: $aTc + TetR -> C2; kc_f*aTc^nc_aTc*TetR^nc_TetR - kc_r*C2;
    nc_aTc = 1; nc_TetR = 1;
  Production_P1: => 10 GFP + 10 TetR; P1*ko*ko_f/ko_r*nr/(1 + ko_f/ko_r*nr + (kr_f/kr_r*LacI)^nc);  // modifiers: LacI, P1
  Production_P2: => 10 LacI; P2*ko*ko_f/ko_r*nr/(1 + ko_f/ko_r*nr + (kr_f/kr_r*TetR)^nc);  // modifiers: P2, TetR

  // Events:
  IPTG_high: at (time >= 500), t0=false, persistent=false, fromTrigger=false: IPTG = 60;
  IPTG_low: at (time >= 1500), t0=false, persistent=false, fromTrigger=false: IPTG = 0;
  aTc_high: at (time >= 2000), t0=false, persistent=false, fromTrigger=false: aTc = 60;
  aTc_low: at (time >= 3000), t0=false, persistent=false, fromTrigger=false: aTc = 0;
end
