// SBML level 2 version 2

function neighborQuantityLeft(a)
  0;
end

function neighborQuantityRight(a)
  0;
end

function neighborQuantityAbove(a)
  0;
end

function neighborQuantityBelow(a)
  0;
end

function getCompartmentLocationX(a)
  0;
end

function getCompartmentLocationY(a)
  0;
end

function F(t, x)
  !t || !x;
end
F is "Eventually Property";

model majority(D, B, Y, Z, default, AA, EE, XX, CC)
  // Created from majority.gcm
  // model units - substance: mole, volume: litre

  // Compartments:
  compartment default = 1;

  // Species:
  substanceOnly species D in default = 200;
  substanceOnly species EE in default = 0;
  substanceOnly species $AA in default = 40;
  substanceOnly species $B in default = 120;
  substanceOnly species CC in default = 120;
  substanceOnly species Y in default = 0;
  substanceOnly species XX in default = 0;
  substanceOnly species Z in default = 0;
  substanceOnly species P8 in default = 2;
  substanceOnly species P5 in default = 2;
  substanceOnly species P4 in default = 2;
  substanceOnly species P7 in default = 2;
  substanceOnly species P6 in default = 2;
  substanceOnly species P1 in default = 2;
  substanceOnly species P3 in default = 2;
  substanceOnly species P2 in default = 2;

  // Parameters:
  kr_f = 0.5; kr_f is "Forward repression binding rate";
  kr_r = 1; kr_r is "Reverse repression binding rate";
  ka_f = 0.0033; ka_f is "Forward activation binding rate";
  ka_r = 1; ka_r is "Reverse activation binding rate";
  kc_f = 0.05; kc_f is "Forward complex formation rate";
  kc_r = 1; kc_r is "Reverse complex formation rate";
  ko_f = 0.033; ko_f is "Forward RNAP binding rate";
  ko_r = 1; ko_r is "Reverse RNAP binding rate";
  kao_f = 1; kao_f is "Forward activated RNAP binding rate";
  kao_r = 1; kao_r is "Reverse activated RNAP binding rate";
  kmdiff_f = 1; kmdiff_f is "Forward membrane diffusion rate";
  kmdiff_r = 0.01; kmdiff_r is "Reverse membrane diffusion rate";
  kd = 0.0075; kd is "Degradation rate";
  kecd = 0.005; kecd is "Extracellular degradation rate";
  nc = 2; nc is "Stoichiometry of binding";
  nr = 30; nr is "Initial RNAP count";
  ko = 0.05; ko is "Open complex production rate";
  kb = 0.0001; kb is "Basal production rate";
  ng = 2; ng is "Initial promoter count";
  np = 10; np is "Stoichiometry of production";
  ka = 0.25; ka is "Activated production rate";
  kecdiff = 1; kecdiff is "Extracellular diffusion rate";

  // Reactions:
  Degradation_D: D => ; kd*D;
  Degradation_EE: EE => ; kd*EE;
  Degradation_CC: CC => ; kd*CC;
  Degradation_Y: Y => ; kd*Y;
  Degradation_XX: XX => ; kd*XX;
  Degradation_Z: Z => ; kd*Z;
  Production_P8: => 10 CC; P8*ko*ko_f/ko_r*nr/(1 + ko_f/ko_r*nr + (kr_f/kr_r*EE)^nc);  // modifiers: P8, EE
  Production_P5: => 10 D; P5*ko*ko_f/ko_r*nr/(1 + ko_f/ko_r*nr + (kr_f/kr_r*Y)^nc);  // modifiers: P5, Y
  Production_P4: => 10 D; P4*ko*ko_f/ko_r*nr/(1 + ko_f/ko_r*nr + (kr_f/kr_r*XX)^nc);  // modifiers: P4, XX
  Production_P7: => 10 EE; P7*ko*ko_f/ko_r*nr/(1 + ko_f/ko_r*nr + (kr_f/kr_r*D)^nc);  // modifiers: P7, D
  Production_P6: => 10 D; P6*ko*ko_f/ko_r*nr/(1 + ko_f/ko_r*nr + (kr_f/kr_r*Z)^nc);  // modifiers: P6, Z
  Production_P1: => 10 Y + 10 XX; P1*ko*ko_f/ko_r*nr/(1 + ko_f/ko_r*nr + (kr_f/kr_r*AA)^nc);  // modifiers: P1, AA
  Production_P3: => 10 Z + 10 Y; P3*ko*ko_f/ko_r*nr/(1 + ko_f/ko_r*nr + (kr_f/kr_r*D)^nc);  // modifiers: P3, D
  Production_P2: => 10 XX + 10 Z; P2*ko*ko_f/ko_r*nr/(1 + ko_f/ko_r*nr + (kr_f/kr_r*B)^nc);  // modifiers: P2, B

  // Events:
  event0: at (time >= 5000), t0=false, persistent=false, fromTrigger=false: AA = 40;
  event1: at (time >= 10000), t0=false, persistent=false, fromTrigger=false: B = 40;
  event2: at (time >= 15000), t0=false, persistent=false, fromTrigger=false: AA = 0;
  event3: at (time >= 20000), t0=false, persistent=false, fromTrigger=false: B = 0;

  // Constraints:
  constraint F(time <= 2100, (EE > 40) && (CC < 20));  // Pr=?{(true)PU[0,2100]((E greater than 40) and (C less than 20))}
end
