// SBML level 2 version 2

model topModell()
  // Created by libsbml flatten routine
  // model units - substance: mole, volume: litre

  // Compartments:
  compartment Cell = 1;

  // Species:
  substanceOnly species $IPTG in Cell = 0;
  substanceOnly species $aTc in Cell = 0;
  substanceOnly species YFP_protein in Cell = 0;
  substanceOnly species aTc_TetR_protein in Cell = 0;
  substanceOnly species LacI_protein in Cell = 0;
  substanceOnly species IPTG_LacI_protein in Cell = 0;
  substanceOnly species TetR_protein in Cell = 60;
  substanceOnly species topModell_Part2_module_sub__Part2_fc in Cell = 2;
  substanceOnly species topModell_Part1_module_sub__Part1_fc in Cell = 2;

  // Parameters:
  kd = 0.0075; kd is "Degradation rate";
  kc_f = 0.05; kc_f is "Forward complex formation rate";
  kc_r = 1; kc_r is "Reverse complex formation rate";
  nc = 2; nc is "Stoichiometry of binding";
  topModell_Part2_module_sub__kr_f = 0.5; topModell_Part2_module_sub__kr_f is "Forward repression binding rate";
  topModell_Part2_module_sub__kr_r = 1; topModell_Part2_module_sub__kr_r is "Reverse repression binding rate";
  topModell_Part2_module_sub__ka_f = 0.0033; topModell_Part2_module_sub__ka_f is "Forward activation binding rate";
  topModell_Part2_module_sub__ka_r = 1; topModell_Part2_module_sub__ka_r is "Reverse activation binding rate";
  topModell_Part2_module_sub__ko_f = 0.033; topModell_Part2_module_sub__ko_f is "Forward RNAP binding rate";
  topModell_Part2_module_sub__ko_r = 1; topModell_Part2_module_sub__ko_r is "Reverse RNAP binding rate";
  topModell_Part2_module_sub__kao_f = 1; topModell_Part2_module_sub__kao_f is "Forward activated RNAP binding rate";
  topModell_Part2_module_sub__kao_r = 1; topModell_Part2_module_sub__kao_r is "Reverse activated RNAP binding rate";
  topModell_Part2_module_sub__nc = 2; topModell_Part2_module_sub__nc is "Stoichiometry of binding";
  topModell_Part2_module_sub__nr = 30; topModell_Part2_module_sub__nr is "Initial RNAP count";
  topModell_Part2_module_sub__ko = 0.05; topModell_Part2_module_sub__ko is "Open complex production rate";
  topModell_Part2_module_sub__kb = 0.0001; topModell_Part2_module_sub__kb is "Basal production rate";
  topModell_Part2_module_sub__ng = 2; topModell_Part2_module_sub__ng is "Initial promoter count";
  topModell_Part2_module_sub__np = 10; topModell_Part2_module_sub__np is "Stoichiometry of production";
  topModell_Part2_module_sub__ka = 0.25; topModell_Part2_module_sub__ka is "Activated production rate";
  topModell_Part1_module_sub__kr_f = 0.5; topModell_Part1_module_sub__kr_f is "Forward repression binding rate";
  topModell_Part1_module_sub__kr_r = 1; topModell_Part1_module_sub__kr_r is "Reverse repression binding rate";
  topModell_Part1_module_sub__ka_f = 0.0033; topModell_Part1_module_sub__ka_f is "Forward activation binding rate";
  topModell_Part1_module_sub__ka_r = 1; topModell_Part1_module_sub__ka_r is "Reverse activation binding rate";
  topModell_Part1_module_sub__ko_f = 0.033; topModell_Part1_module_sub__ko_f is "Forward RNAP binding rate";
  topModell_Part1_module_sub__ko_r = 1; topModell_Part1_module_sub__ko_r is "Reverse RNAP binding rate";
  topModell_Part1_module_sub__kao_f = 1; topModell_Part1_module_sub__kao_f is "Forward activated RNAP binding rate";
  topModell_Part1_module_sub__kao_r = 1; topModell_Part1_module_sub__kao_r is "Reverse activated RNAP binding rate";
  topModell_Part1_module_sub__nc = 2; topModell_Part1_module_sub__nc is "Stoichiometry of binding";
  topModell_Part1_module_sub__nr = 30; topModell_Part1_module_sub__nr is "Initial RNAP count";
  topModell_Part1_module_sub__ko = 0.05; topModell_Part1_module_sub__ko is "Open complex production rate";
  topModell_Part1_module_sub__kb = 0.0001; topModell_Part1_module_sub__kb is "Basal production rate";
  topModell_Part1_module_sub__ng = 2; topModell_Part1_module_sub__ng is "Initial promoter count";
  topModell_Part1_module_sub__np = 10; topModell_Part1_module_sub__np is "Stoichiometry of production";
  topModell_Part1_module_sub__ka = 0.25; topModell_Part1_module_sub__ka is "Activated production rate";

  // Reactions:
  Degradation_aTc_TetR_protein: aTc_TetR_protein => ; Degradation_aTc_TetR_protein_kd*aTc_TetR_protein;
    Degradation_aTc_TetR_protein_kd = 0.0075 u_1_second_n1;
  Degradation_YFP_protein: YFP_protein => ; Degradation_YFP_protein_kd*YFP_protein;
    Degradation_YFP_protein_kd = 0.0075 u_1_second_n1;
  Degradation_LacI_protein: LacI_protein => ; Degradation_LacI_protein_kd*LacI_protein;
    Degradation_LacI_protein_kd = 0.0075 u_1_second_n1;
  Degradation_IPTG_LacI_protein: IPTG_LacI_protein => ; Degradation_IPTG_LacI_protein_kd*IPTG_LacI_protein;
    Degradation_IPTG_LacI_protein_kd = 0.0075 u_1_second_n1;
  Degradation_TetR_protein: TetR_protein => ; Degradation_TetR_protein_kd*TetR_protein;
    Degradation_TetR_protein_kd = 0.0075 u_1_second_n1;
  R_abstracted_production_topModell_Part1_module_sub__Part1_fc: => 10 TetR_protein; ko__topModell_Part1_module_sub__Part1_fc*ng__topModell_Part1_module_sub__Part1_fc*Ko__topModell_Part1_module_sub__Part1_fc*R_abstracted_production_topModell_Part1_module_sub__Part1_fc_RNAP/(1 + Ko__topModell_Part1_module_sub__Part1_fc*R_abstracted_production_topModell_Part1_module_sub__Part1_fc_RNAP + (Kr__LacI_protein_topModell_Part1_module_sub__Part1_fc*LacI_protein)^nc__LacI_protein_topModell_Part1_module_sub__Part1_fc);  // modifiers: LacI_protein
    R_abstracted_production_topModell_Part1_module_sub__Part1_fc_RNAP = 30 u_1_mole_n1; ng__topModell_Part1_module_sub__Part1_fc = 2 u_1_mole_n1; Ko__topModell_Part1_module_sub__Part1_fc = 0.033 u_1_mole_n1; ko__topModell_Part1_module_sub__Part1_fc = 0.05 u_1_second_n1; nc__LacI_protein_topModell_Part1_module_sub__Part1_fc = 2 dimensionless; Kr__LacI_protein_topModell_Part1_module_sub__Part1_fc = 0.5 u_1_mole_n1;
  R_abstracted_production_topModell_Part2_module_sub__Part2_fc: => 10 YFP_protein + 10 LacI_protein; ko__topModell_Part2_module_sub__Part2_fc*ng__topModell_Part2_module_sub__Part2_fc*Ko__topModell_Part2_module_sub__Part2_fc*R_abstracted_production_topModell_Part2_module_sub__Part2_fc_RNAP/(1 + Ko__topModell_Part2_module_sub__Part2_fc*R_abstracted_production_topModell_Part2_module_sub__Part2_fc_RNAP + (Kr__TetR_protein_topModell_Part2_module_sub__Part2_fc*TetR_protein)^nc__TetR_protein_topModell_Part2_module_sub__Part2_fc);  // modifiers: TetR_protein
    R_abstracted_production_topModell_Part2_module_sub__Part2_fc_RNAP = 30 u_1_mole_n1; ng__topModell_Part2_module_sub__Part2_fc = 2 u_1_mole_n1; Ko__topModell_Part2_module_sub__Part2_fc = 0.033 u_1_mole_n1; ko__topModell_Part2_module_sub__Part2_fc = 0.05 u_1_second_n1; nc__TetR_protein_topModell_Part2_module_sub__Part2_fc = 2 dimensionless; Kr__TetR_protein_topModell_Part2_module_sub__Part2_fc = 0.5 u_1_mole_n1;
  Complex_aTc_TetR_protein: 2 $aTc + 2 TetR_protein -> aTc_TetR_protein; Complex_aTc_TetR_protein_kf_c*Complex_aTc_TetR_protein_Kc^(nc__aTc_aTc_TetR_protein + nc__TetR_protein_aTc_TetR_protein - 2)*aTc^nc__aTc_aTc_TetR_protein*TetR_protein^nc__TetR_protein_aTc_TetR_protein - Complex_aTc_TetR_protein_kr_c*aTc_TetR_protein;
    nc__aTc_aTc_TetR_protein = 2 dimensionless; nc__TetR_protein_aTc_TetR_protein = 2 dimensionless; Complex_aTc_TetR_protein_kf_c = 0.05 u_1_mole_n1_1_second_n1; Complex_aTc_TetR_protein_Kc = 0.05 u_1_mole_n1; Complex_aTc_TetR_protein_kr_c = 1 u_1_second_n1;
  Complex_IPTG_LacI_protein: 2 $IPTG + 2 LacI_protein -> IPTG_LacI_protein; Complex_IPTG_LacI_protein_kf_c*Complex_IPTG_LacI_protein_Kc^(nc__IPTG_IPTG_LacI_protein + nc__LacI_protein_IPTG_LacI_protein - 2)*IPTG^nc__IPTG_IPTG_LacI_protein*LacI_protein^nc__LacI_protein_IPTG_LacI_protein - Complex_IPTG_LacI_protein_kr_c*IPTG_LacI_protein;
    nc__IPTG_IPTG_LacI_protein = 2 dimensionless; nc__LacI_protein_IPTG_LacI_protein = 2 dimensionless; Complex_IPTG_LacI_protein_kf_c = 0.05 u_1_mole_n1_1_second_n1; Complex_IPTG_LacI_protein_Kc = 0.05 u_1_mole_n1; Complex_IPTG_LacI_protein_kr_c = 1 u_1_second_n1;

  // Events:
  aTc_High: at (2000) after (true), t0=false, persistent=false, fromTrigger=false: aTc = 60;
  aTc_low: at (4000) after (true), t0=false, persistent=false, fromTrigger=false: aTc = 0;
  IPTG_high: at (6000) after (true), t0=false, persistent=false, fromTrigger=false: IPTG = 60;
  IPTG_low: at (8000) after (true), t0=false, persistent=false, fromTrigger=false: IPTG = 0;

  // Unit definitions:
  unit u_1_second_n1 = 1 / second;
  unit u_1_mole_n1 = 1 / mole;
  unit u_1_mole_n1_1_second_n1 = 1 / (mole * second);
end
