// SBML level 2 version 2

function St(x)
  !(!x);
end
St is "Steady State Property";

function F(t, x)
  !t || !x;
end
F is "Eventually Property";

model toggle_switch()

  // Compartments:
  compartment default = 1;

  // Species:
  substanceOnly species LacI in default = 0;
  substanceOnly species TetR in default = 0;
  substanceOnly species $IPTG in default = 0;
  substanceOnly species C1 in default = 0;
  substanceOnly species $aTc in default = 0;
  substanceOnly species C2 in default = 0;
  substanceOnly species P1 in default = 2;
  substanceOnly species P2 in default = 2;
  substanceOnly species GFP in default = 0;

  // Parameters:
  kr_f = 0.5; kr_f is "Forward repression binding rate";
  kr_r = 1; kr_r is "Reverse repression binding rate";
  ka_f = 0.0033; ka_f is "Forward activation binding rate";
  ka_r = 1; ka_r is "Reverse activation binding rate";
  kc_f = 0.05; kc_f is "Forward complex formation rate";
  kc_r = 1; kc_r is "Reverse complex formation rate";
  ko_f = 0.033; ko_f is "Forward RNAP binding rate";
  ko_r = 1; ko_r is "Reverse RNAP binding rate";
  kao_f = 1; kao_f is "Forward activated RNAP binding rate";
  kao_r = 1; kao_r is "Reverse activated RNAP binding rate";
  kmdiff_f = 1; kmdiff_f is "Forward membrane diffusion rate";
  kmdiff_r = 0.01; kmdiff_r is "Reverse membrane diffusion rate";
  kd = 0.0075; kd is "Degradation rate";
  kecd = 0.005; kecd is "Extracellular degradation rate";
  nc = 2; nc is "Stoichiometry of binding";
  nr = 30; nr is "Initial RNAP count";
  ko = 0.05; ko is "Open complex production rate";
  kb = 0.0001; kb is "Basal production rate";
  ng = 2; ng is "Initial promoter count";
  np = 10; np is "Stoichiometry of production";
  ka = 0.25; ka is "Activated production rate";
  kecdiff = 1; kecdiff is "Extracellular diffusion rate";

  // Reactions:
  Degradation_LacI: LacI => ; kd*LacI;
  Degradation_TetR: TetR => ; kd*TetR;
  Complex_C1: $IPTG + LacI -> C1; kc_f*IPTG^nc_IPTG*LacI^nc_LacI - kc_r*C1;
    nc_IPTG = 1; nc_LacI = 1;
  Complex_C2: TetR + $aTc -> C2; kc_f*TetR^nc_TetR*aTc^nc_aTc - kc_r*C2;
    nc_TetR = 1; nc_aTc = 1;
  Production_P1: => 10 TetR + 10 GFP; P1*ko*(ko_f/ko_r)*nr/(1 + ko_f/ko_r*nr + (kr_f/kr_r*LacI)^nc);  // modifiers: P1, LacI
  Production_P2: => 10 LacI; P2*ko*(ko_f/ko_r)*nr/(1 + ko_f/ko_r*nr + (kr_f/kr_r*TetR)^nc);  // modifiers: P2, TetR
  Degradation_C1: C1 => ; kd*C1;
  Degradation_C2: C2 => ; kd*C2;
  Degradation_GFP: GFP => ; kd*GFP;

  // Events:
  event0: at (time >= 5000), t0=false, persistent=false, fromTrigger=false: IPTG = 60;
  event1: at (time >= 10000), t0=false, persistent=false, fromTrigger=false: IPTG = 0;
  event2: at (time >= 15000), t0=false, persistent=false, fromTrigger=false: aTc = 60;
  event3: at (time >= 20000), t0=false, persistent=false, fromTrigger=false: aTc = 0;

  // Constraints:
  constraint St((TetR > 40) && (LacI < 20));
  constraint St((LacI > 40) && (TetR < 20));
  constraint F(time <= 10, (LacI > 40) && (TetR < 20));
  constraint F(time <= 5000, (TetR > 40) && (LacI < 20));
end
